ORIGIN := 1
Xw := [0, 130, 150]
Yw := [0, 30, 70, 100]
m := 5  # -число подобластей
X :=
    for i ∈ 1 .. cols(Xw)
        for j ∈ 1 .. cols(Xw)*cols(Yw)
            k ← trunc((j - 1)/cols(Yw)) + 1
            X[j] ← transpose(Xw)[k]
        V ← stack(V, transpose(Yw))
    for i ∈ 2 .. cols(Xw)*cols(Yw) + 1
        J[i - 1] ← V[i]
    augment(X, J)
SOD :=
    for i ∈ 1 .. 5
        for j ∈ 1 .. m
            S[i, 1] ← i
            S[i, 2] ← i
            S[i, 3] ← S[i, 2] + 4
            S[i, 4] ← S[i, 3] + 1
            S[i, 5] ← S[i, 4] - 4
    S
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X = [0, 0; 0, 30; 0, 70; 0, 100; 130, 0; 130, 30; 130, 70; 130, 100; 150, 0; 150, 30; 150, 70; 150, 100]
SOD = [1, 1, 5, 6, 2; 2, 2, 6, 7, 3; 3, 3, 7, 8, 4; 4, 4, 8, 9, 5; 5, 5, 9, 10, 6]
SOD := [1, 1, 5, 6, 2; 2, 2, 6, 7, 3; 3, 3, 7, 8, 4; 4, 5, 9, 10, 6; 5, 7, 11, 12, 8]
FX :=
    for i ∈ 1 .. m
        for j ∈ 1 .. 4
            FXS[i, j] ← X[:, 1][SOD[i, j + 1]]
            FXS[i, 5] ← FXS[i, 1]
            FXS[i, 6] ← sqrt(-1)
    FXS
FY :=
    for i ∈ 1 .. m
        for j ∈ 1 .. 4
            FYS[i, j] ← X[:, 2][SOD[i, j + 1]]
            FYS[i, 5] ← FYS[i, 1]
            FYS[i, 6] ← sqrt(-1)
    FYS
X = [0, 0; 0, 30; 0, 70; 0, 100; 130, 0; 130, 30; 130, 70; 130, 100; 150, 0; 150, 30; 150, 70; 150, 100]
Prog(M) :=
    k ← 1
    for i ∈ 1 .. rows(M)
        for j ∈ 1 .. cols(M)
            V[k] ← M[i, j]
            k ← k + 1
    V
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nodes := READPRN("nodes.txt")
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elements := READPRN("elements.txt")
m := rows(elements) = 2000  # - число элементов
n := rows(nodes) = 2111
ORIGIN := 1
FX :=
    for i ∈ 1 .. m
        for j ∈ 1 .. 4
            FX[i, j] ← nodes[:, 2][elements[i, j + 1]]
            FX[i, 4] ← FX[i, 1]
            FX[i, 5] ← FX[i, 1]
            FX[i, 6] ← sqrt(-1)
    FX
FY :=
    for i ∈ 1 .. m
        for j ∈ 1 .. 4
            FY[i, j] ← nodes[:, 3][elements[i, j + 1]]
            FY[i, 4] ← FY[i, 3] if j == 3
            FY[i, 5] ← FY[i, 1]
            FY[i, 6] ← sqrt(-1)
    FY
nodes =  # no stored result
elements =  # no stored result
Prog(M) :=
    k ← 1
    for i ∈ 1 .. rows(M)
        for j ∈ 1 .. cols(M)
            G[k] ← M[i, j]
            k ← k + 1
    G
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nodes1 := READPRN("nodes.txt")
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nodes1 =  # no stored result
elements1 := READPRN("elements.txt")
m1 := rows(elements1) = 2000  # - число элементов после удаления подобласти
rows(nodes1) = 2111  # - число узлов после удаления подобласти
ORIGIN := 1
FX :=
    for i ∈ 1 .. m1
        for j ∈ 1 .. 4
            FX[i, j] ← nodes1[:, 2][elements1[i, j + 1]]
            FX[i, 4] ← FX[i, 1]
            FX[i, 5] ← FX[i, 1]
            FX[i, 6] ← sqrt(-1)
    FX
FY :=
    for i ∈ 1 .. m1
        for j ∈ 1 .. 4
            FY[i, j] ← nodes1[:, 3][elements1[i, j + 1]]
            FY[i, 4] ← FY[i, 3] if j == 3
            FY[i, 5] ← FY[i, 1]
            FY[i, 6] ← sqrt(-1)
    FY
nodes1 =  # no stored result
elements1 =  # no stored result
Prog(M) :=
    k ← 1
    for i ∈ 1 .. rows(M)
        for j ∈ 1 .. cols(M)
            G[k] ← M[i, j]
            k ← k + 1
    G
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FX =  # no stored result
FY =  # no stored result
global_stiffnes_matrix_block := READPRN("out_stiffness_matrix_block.txt")  # error: Не удается открыть файл данных.
global_stiffness_matrix := READPRN("out_stiffness_matrix.txt")
global_load_vector_block := READPRN("out_loads_vec_block.txt")  # error: Не удается открыть файл данных.
global_load_vector := READPRN("out_loads_vec.txt")
GSM := global_stiffness_matrix
GLV := global_load_vector
# сумма элементов строки или столбца матрицы должна быть равна нулю
sum :=
    for i ∈ 1 .. rows(GSM)
        sum[i] ← sum(GSM[i, j], j = 1 .. cols(GSM))
    sum
GLV =  # no stored result
sum =  # no stored result
sum(GLV[i], i = 1 .. rows(GLV)) = -100000  # Н
u := READPRN("u.txt")  # вектор перемещений, полученный с помощью PARDISO
# Аналитика:
a := transpose(Xw)[cols(Xw)] - transpose(Xw)[1] = 150  # мм
b := transpose(Yw)[cols(Yw)] - transpose(Yw)[1] = 100  # мм
q := 1000  # Н/мм
t := 3  # мм
E := 2.1*10^5  # МПа
σ := q*b/(t*b) = 333.333  # МПа
|GSM| =  # error: Эта матрица должна быть квадратной.
disp := GSM^-1*GLV  # error: Эта матрица должна быть квадратной.
scale := 40
u_an := a*σ/E = 0.238095
NEW_COORDS :=
    n ← rows(nodes)
    for i ∈ 1 .. n
        res[i, 2] ← nodes[i, 2] + scale*u[2*i - 1]
        res[i, 3] ← nodes[i, 3] + scale*u[2*i - 0]
        res[i, 1] ← i
    res
NEW_COORDS =  # no stored result
disp =  # error: Эта переменная не определена.
u =  # no stored result
FXn :=
    for i ∈ 1 .. m1
        for j ∈ 1 .. 4
            FX[i, j] ← NEW_COORDS[:, 2][elements[i, j + 1]]
            FX[i, 4] ← FX[i, 1]
            FX[i, 5] ← FX[i, 1]
            FX[i, 6] ← sqrt(-1)
    FX
FYn :=
    for i ∈ 1 .. m1
        for j ∈ 1 .. 4
            FY[i, j] ← NEW_COORDS[:, 3][elements1[i, j + 1]]
            FY[i, 4] ← FY[i, 3] if j == 3
            FY[i, 5] ← FY[i, 1]
            FY[i, 6] ← sqrt(-1)
    FY
Prog(M) :=
    k ← 1
    for i ∈ 1 .. rows(M)
        for j ∈ 1 .. cols(M)
            G[k] ← M[i, j]
            k ← k + 1
    G
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(|u[1]| - |u[3]|)/|u[1]|*100 = 17.0983
