datax := READPRN("x_stress_data.txt")
datay := READPRN("y_stress_data.txt")
dataVM := READPRN("VM_stress_data.txt")
y := datax[:, 0]
KKNx := datax[:, 1]
y1 := datay[:, 0]
KKNy := datay[:, 1]
y2 := dataVM[:, 0]
KKNvm := dataVM[:, 1]
ny := 10  # количество разбиений по y
yy1 :=
    for i ∈ 0 .. ny - 1
        yy1[i] ← y[i]
    yy1
yy2 :=
    for i ∈ 0 .. ny - 1
        yy2[i] ← y[i + ny]
    yy2
y11 :=
    for i ∈ 0 .. ny - 1
        y11[i] ← y1[i]
    y11
y12 :=
    for i ∈ 0 .. ny - 1
        y12[i] ← y1[i + ny]
    y12
y21 :=
    for i ∈ 0 .. ny - 1
        y21[i] ← y2[i]
    y21
y22 :=
    for i ∈ 0 .. ny - 1
        y22[i] ← y2[i + ny]
    y22
KKNx1 :=
    for i ∈ 0 .. ny - 1
        KKNx1[i] ← KKNx[i]
    KKNx1
KKNy1 :=
    for i ∈ 0 .. ny - 1
        KKNy1[i] ← KKNy[i]
    KKNy1
KKNvm1 :=
    for i ∈ 0 .. ny - 1
        KKNvm1[i] ← KKNvm[i]
    KKNvm1
KKNx2 :=
    for i ∈ 0 .. ny - 1
        KKNx2[i] ← KKNx[i + ny]
    KKNx2
KKNy2 :=
    for i ∈ 0 .. ny - 1
        KKNy2[i] ← KKNy[i + ny]
    KKNy2
KKNvm2 :=
    for i ∈ 0 .. ny - 1
        KKNvm2[i] ← KKNvm[i + ny]
    KKNvm2
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max(KKNx) = 4.31743
max(KKNy) = 0.349341
max(KKNvm) = 4.32726
dataK_rw := READPRN("K(rw).txt")
Kmax := dataK_rw[:, 1]
r_w := dataK_rw[:, 0]
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