ORIGIN := 1
Xw := [0, 50]
Yw := [0, 30]
m := 5  # -число подобластей
X :=
    for i ∈ 1 .. cols(Xw)
        for j ∈ 1 .. cols(Xw)*cols(Yw)
            k ← trunc((j - 1)/cols(Yw)) + 1
            X[j] ← transpose(Xw)[k]
        V ← stack(V, transpose(Yw))
    for i ∈ 2 .. cols(Xw)*cols(Yw) + 1
        J[i - 1] ← V[i]
    augment(X, J)
SOD :=
    for i ∈ 1 .. 5
        for j ∈ 1 .. m
            S[i, 1] ← i
            S[i, 2] ← i
            S[i, 3] ← S[i, 2] + 4
            S[i, 4] ← S[i, 3] + 1
            S[i, 5] ← S[i, 4] - 4
    S
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X = [0, 0; 0, 30; 50, 0; 50, 30]
SOD = [1, 1, 5, 6, 2; 2, 2, 6, 7, 3; 3, 3, 7, 8, 4; 4, 4, 8, 9, 5; 5, 5, 9, 10, 6]
SOD := [1, 1, 5, 6, 2; 2, 2, 6, 7, 3; 3, 3, 7, 8, 4; 4, 5, 9, 10, 6; 5, 7, 11, 12, 8]
FX :=
    for i ∈ 1 .. m
        for j ∈ 1 .. 4
            FXS[i, j] ← X[:, 1][SOD[i, j + 1]]
            FXS[i, 5] ← FXS[i, 1]
            FXS[i, 6] ← sqrt(-1)
    FXS  # error: This array index is invalid for this array.
FY :=
    for i ∈ 1 .. m
        for j ∈ 1 .. 4
            FYS[i, j] ← X[:, 2][SOD[i, j + 1]]
            FYS[i, 5] ← FYS[i, 1]
            FYS[i, 6] ← sqrt(-1)
    FYS  # error: This array index is invalid for this array.
X = [0, 0; 0, 30; 50, 0; 50, 30]
Prog(M) :=
    k ← 1
    for i ∈ 1 .. rows(M)
        for j ∈ 1 .. cols(M)
            V[k] ← M[i, j]
            k ← k + 1
    V
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nodes := READPRN("nodes.txt")
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elements := READPRN("elements.txt")
m := rows(elements) = 24  # - число элементов
n := rows(nodes) = 35
ORIGIN := 1
FX :=
    for i ∈ 1 .. m
        for j ∈ 1 .. 4
            FX[i, j] ← nodes[:, 2][elements[i, j + 1]]
            FX[i, 4] ← FX[i, 3] if j == 3
            FX[i, 5] ← FX[i, 1]
            FX[i, 6] ← sqrt(-1)
    FX
FY :=
    for i ∈ 1 .. m
        for j ∈ 1 .. 4
            FY[i, j] ← nodes[:, 3][elements[i, j + 1]]
            FY[i, 4] ← FY[i, 3] if j == 3
            FY[i, 5] ← FY[i, 1]
            FY[i, 6] ← sqrt(-1)
    FY
nodes = [
    1, 0, 0;
    2, 71.4645, 0;
    3, 142.929, 0;
    4, 146.464, 0;
    5, 150, 0;
    6, 0, 21.4645;
    7, 71.4645, 21.4645;
    8, 142.929, 21.4645;
    9, 146.464, 20.3806;
    10, 150, 20
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]
elements = [
    1, 1, 2, 7, 6;
    2, 2, 3, 8, 7;
    3, 3, 4, 9, 8;
    4, 4, 5, 10, 9;
    5, 6, 7, 12, 11;
    6, 7, 8, 13, 12;
    7, 8, 9, 14, 13;
    8, 9, 10, 15, 14;
    9, 11, 12, 17, 16;
    10, 12, 13, 18, 17;
    11, 13, 14, 19, 18;
    12, 14, 15, 20, 19;
    13, 16, 17, 22, 21;
    14, 17, 18, 23, 22;
    15, 18, 19, 24, 23;
    16, 19, 20, 25, 24;
    17, 21, 22, 27, 26;
    18, 22, 23, 28, 27;
    19, 23, 24, 29, 28;
    20, 24, 25, 30, 29;
    21, 26, 27, 32, 31;
    22, 27, 28, 33, 32;
    23, 28, 29, 34, 33;
    24, 29, 30, 35, 34
]
Prog(M) :=
    k ← 1
    for i ∈ 1 .. rows(M)
        for j ∈ 1 .. cols(M)
            G[k] ← M[i, j]
            k ← k + 1
    G
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nodes1 := READPRN("nodes.txt")
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nodes1 = [
    1, 0, 0;
    2, 71.4645, 0;
    3, 142.929, 0;
    4, 146.464, 0;
    5, 150, 0;
    6, 0, 21.4645;
    7, 71.4645, 21.4645;
    8, 142.929, 21.4645;
    9, 146.464, 20.3806;
    10, 150, 20
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]
elements1 := READPRN("elements.txt")
m1 := rows(elements1) = 24  # - число элементов после удаления подобласти
rows(nodes1) = 35  # - число узлов после удаления подобласти
ORIGIN := 1
FX :=
    for i ∈ 1 .. m1
        for j ∈ 1 .. 4
            FX[i, j] ← nodes1[:, 2][elements1[i, j + 1]]
            FX[i, 4] ← FX[i, 1] if j == 3
            FX[i, 5] ← FX[i, 1]
            FX[i, 6] ← sqrt(-1)
    FX
FY :=
    for i ∈ 1 .. m1
        for j ∈ 1 .. 4
            FY[i, j] ← nodes1[:, 3][elements1[i, j + 1]]
            FY[i, 4] ← FY[i, 3] if j == 3
            FY[i, 5] ← FY[i, 1]
            FY[i, 6] ← sqrt(-1)
    FY
nodes1 = [
    1, 0, 0;
    2, 71.4645, 0;
    3, 142.929, 0;
    4, 146.464, 0;
    5, 150, 0;
    6, 0, 21.4645;
    7, 71.4645, 21.4645;
    8, 142.929, 21.4645;
    9, 146.464, 20.3806;
    10, 150, 20
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]
elements1 = [
    1, 1, 2, 7, 6;
    2, 2, 3, 8, 7;
    3, 3, 4, 9, 8;
    4, 4, 5, 10, 9;
    5, 6, 7, 12, 11;
    6, 7, 8, 13, 12;
    7, 8, 9, 14, 13;
    8, 9, 10, 15, 14;
    9, 11, 12, 17, 16;
    10, 12, 13, 18, 17;
    11, 13, 14, 19, 18;
    12, 14, 15, 20, 19;
    13, 16, 17, 22, 21;
    14, 17, 18, 23, 22;
    15, 18, 19, 24, 23;
    16, 19, 20, 25, 24;
    17, 21, 22, 27, 26;
    18, 22, 23, 28, 27;
    19, 23, 24, 29, 28;
    20, 24, 25, 30, 29;
    21, 26, 27, 32, 31;
    22, 27, 28, 33, 32;
    23, 28, 29, 34, 33;
    24, 29, 30, 35, 34
]
Prog(M) :=
    k ← 1
    for i ∈ 1 .. rows(M)
        for j ∈ 1 .. cols(M)
            G[k] ← M[i, j]
            k ← k + 1
    G
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FX = [
    0, 71.4645, 71.4645, 0, 0, 1i;
    71.4645, 142.929, 142.929, 71.4645, 71.4645, 1i;
    142.929, 146.464, 146.464, 142.929, 142.929, 1i;
    146.464, 150, 150, 146.464, 146.464, 1i;
    0, 71.4645, 71.4645, 0, 0, 1i;
    71.4645, 142.929, 142.929, 71.4645, 71.4645, 1i;
    142.929, 146.464, 146.464, 142.929, 142.929, 1i;
    146.464, 150, 150, 146.464, 146.464, 1i;
    0, 71.4645, 70, 0, 0, 1i;
    71.4645, 142.929, 140, 70, 71.4645, 1i;
    142.929, 146.464, 145, 140, 142.929, 1i;
    146.464, 150, 150, 145, 146.464, 1i;
    0, 70, 71.4645, 0, 0, 1i;
    70, 140, 142.929, 71.4645, 70, 1i;
    140, 145, 146.464, 142.929, 140, 1i;
    145, 150, 150, 146.464, 145, 1i;
    0, 71.4645, 71.4645, 0, 0, 1i;
    71.4645, 142.929, 142.929, 71.4645, 71.4645, 1i;
    142.929, 146.464, 146.464, 142.929, 142.929, 1i;
    146.464, 150, 150, 146.464, 146.464, 1i;
    0, 71.4645, 71.4645, 0, 0, 1i;
    71.4645, 142.929, 142.929, 71.4645, 71.4645, 1i;
    142.929, 146.464, 146.464, 142.929, 142.929, 1i;
    146.464, 150, 150, 146.464, 146.464, 1i
]
FY = [
    0, 0, 21.4645, 21.4645, 0, 1i;
    0, 0, 21.4645, 21.4645, 0, 1i;
    0, 0, 20.3806, 21.4645, 0, 1i;
    0, 0, 20, 20.3806, 0, 1i;
    21.4645, 21.4645, 42.9289, 42.9289, 21.4645, 1i;
    21.4645, 21.4645, 42.9289, 42.9289, 21.4645, 1i;
    21.4645, 20.3806, 40.7612, 42.9289, 21.4645, 1i;
    20.3806, 20, 40, 40.7612, 20.3806, 1i;
    42.9289, 42.9289, 50, 50, 42.9289, 1i;
    42.9289, 42.9289, 50, 50, 42.9289, 1i;
    42.9289, 40.7612, 50, 50, 42.9289, 1i;
    40.7612, 40, 50, 50, 40.7612, 1i;
    50, 50, 57.0711, 57.0711, 50, 1i;
    50, 50, 57.0711, 57.0711, 50, 1i;
    50, 50, 59.2388, 57.0711, 50, 1i;
    50, 50, 60, 59.2388, 50, 1i;
    57.0711, 57.0711, 78.5355, 78.5355, 57.0711, 1i;
    57.0711, 57.0711, 78.5355, 78.5355, 57.0711, 1i;
    57.0711, 59.2388, 79.6194, 78.5355, 57.0711, 1i;
    59.2388, 60, 80, 79.6194, 59.2388, 1i;
    78.5355, 78.5355, 100, 100, 78.5355, 1i;
    78.5355, 78.5355, 100, 100, 78.5355, 1i;
    78.5355, 79.6194, 100, 100, 78.5355, 1i;
    79.6194, 80, 100, 100, 79.6194, 1i
]
global_stiffness_matrix := READPRN("out_stiffness_matrix.txt")
global_load_vector := READPRN("out_loads_vec.txt")
GSM := global_stiffness_matrix
GLV := global_load_vector
# сумма элементов строки или столбца матрицы должна быть равна нулю
sum :=
    for i ∈ 1 .. rows(GSM)
        sum[i] ← sum(GSM[i, j], j = 1 .. cols(GSM))
    sum
GLV =  # no stored result
sum =  # no stored result
sum(GLV[i], i = 1 .. rows(GLV)) = -30000  # Н
u := READPRN("u.txt")  # вектор перемещений, полученный с помощью PARDISO
# Аналитика:
a := transpose(Xw)[cols(Xw)] - transpose(Xw)[1] = 50  # мм
b := transpose(Yw)[cols(Yw)] - transpose(Yw)[1] = 30  # мм
q := 1000  # Н/мм
t := 3  # мм
E := 2.1*10^5  # МПа
σ := q*b/(t*b) = 333.333  # МПа
|GSM| = Infinity
disp := GSM^-1*GLV
scale := 100
u_an := a*σ/E = 0.0793651
NEW_COORDS :=
    n ← rows(nodes)
    for i ∈ 1 .. n
        res[i, 2] ← nodes[i, 2] + scale*u[2*i - 1]
        res[i, 3] ← nodes[i, 3] + scale*u[2*i - 0]
        res[i, 1] ← i
    res
NEW_COORDS = [
    1, -7.87069, 0.714392;
    2, 64.3875, 0.715182;
    3, 136.646, 0.716415;
    4, 140.973, 0.718483;
    5, 145.3, 0.72133;
    6, -3.91431, 22.1881;
    7, 68.3264, 22.1852;
    8, 140.551, 22.1654;
    9, 144.83, 21.0189;
    10, 149.079, 20.481
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]
disp =  # no stored result
u =  # no stored result
FXn :=
    for i ∈ 1 .. m1
        for j ∈ 1 .. 4
            FX[i, j] ← NEW_COORDS[:, 2][elements[i, j + 1]]
            FX[i, 4] ← FX[i, 3] if j == 3
            FX[i, 5] ← FX[i, 1]
            FX[i, 6] ← sqrt(-1)
    FX
FYn :=
    for i ∈ 1 .. m1
        for j ∈ 1 .. 4
            FY[i, j] ← NEW_COORDS[:, 3][elements1[i, j + 1]]
            FY[i, 4] ← FY[i, 3] if j == 3
            FY[i, 5] ← FY[i, 1]
            FY[i, 6] ← sqrt(-1)
    FY
Prog(M) :=
    k ← 1
    for i ∈ 1 .. rows(M)
        for j ∈ 1 .. cols(M)
            G[k] ← M[i, j]
            k ← k + 1
    G
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nodes = [
    1, 0, 0;
    2, 71.4645, 0;
    3, 142.929, 0;
    4, 146.464, 0;
    5, 150, 0;
    6, 0, 21.4645;
    7, 71.4645, 21.4645;
    8, 142.929, 21.4645;
    9, 146.464, 20.3806;
    10, 150, 20
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]
NEW_COORDS = [
    1, -7.87069, 0.714392;
    2, 64.3875, 0.715182;
    3, 136.646, 0.716415;
    4, 140.973, 0.718483;
    5, 145.3, 0.72133;
    6, -3.91431, 22.1881;
    7, 68.3264, 22.1852;
    8, 140.551, 22.1654;
    9, 144.83, 21.0189;
    10, 149.079, 20.481
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]
FX = [
    0, 71.4645, 71.4645, 0, 0, 1i;
    71.4645, 142.929, 142.929, 71.4645, 71.4645, 1i;
    142.929, 146.464, 146.464, 142.929, 142.929, 1i;
    146.464, 150, 150, 146.464, 146.464, 1i;
    0, 71.4645, 71.4645, 0, 0, 1i;
    71.4645, 142.929, 142.929, 71.4645, 71.4645, 1i;
    142.929, 146.464, 146.464, 142.929, 142.929, 1i;
    146.464, 150, 150, 146.464, 146.464, 1i;
    0, 71.4645, 70, 0, 0, 1i;
    71.4645, 142.929, 140, 70, 71.4645, 1i;
    142.929, 146.464, 145, 140, 142.929, 1i;
    146.464, 150, 150, 145, 146.464, 1i;
    0, 70, 71.4645, 0, 0, 1i;
    70, 140, 142.929, 71.4645, 70, 1i;
    140, 145, 146.464, 142.929, 140, 1i;
    145, 150, 150, 146.464, 145, 1i;
    0, 71.4645, 71.4645, 0, 0, 1i;
    71.4645, 142.929, 142.929, 71.4645, 71.4645, 1i;
    142.929, 146.464, 146.464, 142.929, 142.929, 1i;
    146.464, 150, 150, 146.464, 146.464, 1i;
    0, 71.4645, 71.4645, 0, 0, 1i;
    71.4645, 142.929, 142.929, 71.4645, 71.4645, 1i;
    142.929, 146.464, 146.464, 142.929, 142.929, 1i;
    146.464, 150, 150, 146.464, 146.464, 1i
]
FXn = [
    -7.87069, 64.3875, 68.3264, -3.91431, -7.87069, 1i;
    64.3875, 136.646, 140.551, 68.3264, 64.3875, 1i;
    136.646, 140.973, 144.83, 140.551, 136.646, 1i;
    140.973, 145.3, 149.079, 144.83, 140.973, 1i;
    -3.91431, 68.3264, 63.5937, 0, -3.91431, 1i;
    68.3264, 140.551, 135.852, 63.5937, 68.3264, 1i;
    140.551, 144.83, 140.18, 135.852, 140.551, 1i;
    144.83, 149.079, 144.509, 140.18, 144.83, 1i;
    0, 63.5937, 66.0858, -4.70024, 0, 1i;
    63.5937, 135.852, 136.863, 66.0858, 63.5937, 1i;
    135.852, 140.18, 142.628, 136.863, 135.852, 1i;
    140.18, 144.509, 148.374, 142.628, 140.18, 1i;
    -4.70024, 66.0858, 71.4645, -0.872553, -4.70024, 1i;
    66.0858, 136.863, 135.058, 71.4645, 66.0858, 1i;
    136.863, 142.628, 139.387, 135.058, 136.863, 1i;
    142.628, 148.374, 143.716, 139.387, 142.628, 1i;
    -0.872553, 71.4645, 66.7641, -5.49106, -0.872553, 1i;
    71.4645, 135.058, 139.015, 66.7641, 71.4645, 1i;
    135.058, 139.387, 143.329, 139.015, 135.058, 1i;
    139.387, 143.716, 147.633, 143.329, 139.387, 1i;
    -5.49106, 66.7641, 70.627, -1.61413, -5.49106, 1i;
    66.7641, 139.015, 142.929, 70.627, 66.7641, 1i;
    139.015, 143.329, 138.593, 142.929, 139.015, 1i;
    143.329, 147.633, 142.923, 138.593, 143.329, 1i
]
FY = [
    0, 0, 21.4645, 21.4645, 0, 1i;
    0, 0, 21.4645, 21.4645, 0, 1i;
    0, 0, 20.3806, 21.4645, 0, 1i;
    0, 0, 20, 20.3806, 0, 1i;
    21.4645, 21.4645, 42.9289, 42.9289, 21.4645, 1i;
    21.4645, 21.4645, 42.9289, 42.9289, 21.4645, 1i;
    21.4645, 20.3806, 40.7612, 42.9289, 21.4645, 1i;
    20.3806, 20, 40, 40.7612, 20.3806, 1i;
    42.9289, 42.9289, 50, 50, 42.9289, 1i;
    42.9289, 42.9289, 50, 50, 42.9289, 1i;
    42.9289, 40.7612, 50, 50, 42.9289, 1i;
    40.7612, 40, 50, 50, 40.7612, 1i;
    50, 50, 57.0711, 57.0711, 50, 1i;
    50, 50, 57.0711, 57.0711, 50, 1i;
    50, 50, 59.2388, 57.0711, 50, 1i;
    50, 50, 60, 59.2388, 50, 1i;
    57.0711, 57.0711, 78.5355, 78.5355, 57.0711, 1i;
    57.0711, 57.0711, 78.5355, 78.5355, 57.0711, 1i;
    57.0711, 59.2388, 79.6194, 78.5355, 57.0711, 1i;
    59.2388, 60, 80, 79.6194, 59.2388, 1i;
    78.5355, 78.5355, 100, 100, 78.5355, 1i;
    78.5355, 78.5355, 100, 100, 78.5355, 1i;
    78.5355, 79.6194, 100, 100, 78.5355, 1i;
    79.6194, 80, 100, 100, 79.6194, 1i
]
FYn = [
    0.714392, 0.715182, 22.1852, 22.1881, 0.714392, 1i;
    0.715182, 0.716415, 22.1654, 22.1852, 0.715182, 1i;
    0.716415, 0.718483, 21.0189, 22.1654, 0.716415, 1i;
    0.718483, 0.72133, 20.481, 21.0189, 0.718483, 1i;
    22.1881, 22.1852, 43.6147, 42.9289, 22.1881, 1i;
    22.1852, 22.1654, 43.6155, 43.6147, 22.1852, 1i;
    22.1654, 21.0189, 41.4491, 43.6155, 22.1654, 1i;
    21.0189, 20.481, 40.69, 41.4491, 21.0189, 1i;
    42.9289, 43.6147, 50.6954, 50.6929, 42.9289, 1i;
    43.6147, 43.6155, 50.6931, 50.6954, 43.6147, 1i;
    43.6155, 41.4491, 50.6732, 50.6931, 43.6155, 1i;
    41.4491, 40.69, 50.6142, 50.6732, 41.4491, 1i;
    50.6929, 50.6954, 57.0711, 57.5154, 50.6929, 1i;
    50.6954, 50.6931, 57.7283, 57.0711, 50.6954, 1i;
    50.6931, 50.6732, 59.8968, 57.7283, 50.6931, 1i;
    50.6732, 50.6142, 60.6593, 59.8968, 50.6732, 1i;
    57.5154, 57.0711, 79.2, 79.197, 57.5154, 1i;
    57.0711, 57.7283, 79.2027, 79.2, 57.0711, 1i;
    57.7283, 59.8968, 80.2846, 79.2027, 57.7283, 1i;
    59.8968, 60.6593, 80.6459, 80.2846, 59.8968, 1i;
    79.197, 79.2, 100.411, 100.588, 79.197, 1i;
    79.2, 79.2027, 100, 100.411, 79.2, 1i;
    79.2027, 80.2846, 100.629, 100, 79.2027, 1i;
    80.2846, 80.6459, 100.629, 100.629, 80.2846, 1i
]
(|u[1]| - |u[3]|)/|u[1]|*100 = 10.0841
