xx := [0; 150]
yy := [0; 100]
X1(x) := (xx[1] - x)/(xx[1] - xx[0])
X2(x) := (x - xx[0])/(xx[1] - xx[0])
Y1(y) := (yy[1] - y)/(yy[1] - yy[0])
Y2(y) := (y - yy[0])/(yy[1] - yy[0])
x_cur := xx[0]
y_cur := yy[1]
φ1(x, y) := X1(x)*Y1(y)
φ2(x, y) := X2(x)*Y1(y)
φ3(x, y) := X2(x)*Y2(y)
φ4(x, y) := X1(x)*Y2(y)
φ4(x_cur, y_cur) = 1
φ3(x_cur, y_cur) = 0
φ(x, y) := [φ1(x, y); φ2(x, y); φ3(x, y); φ4(x, y)]
φ1(x_cur, y_cur) = 0
φ2(x_cur, y_cur) = 0
Kx11
Kx12
Kx13
Kx14
Kx21
Kx22
Kx23
Kx24
Kx := [
    integral(integral((d/dx(φ(x, y)[0]))^2, x = xx[0] .. xx[1]), y = yy[0] .. yy[1]);
    integral(integral(d/dx(φ(x, y)[0])*d/dx(φ(x, y)[1]), x = xx[0] .. xx[1]), y = yy[0] .. yy[1]);
    integral(integral(d/dx(φ(x, y)[0])*d/dx(φ(x, y)[2]), x = xx[0] .. xx[1]), y = yy[0] .. yy[1]);
    integral(integral(d/dx(φ(x, y)[0])*d/dx(φ(x, y)[3]), x = xx[0] .. xx[1]), y = yy[0] .. yy[1]);
    integral(integral(d/dx(φ(x, y)[1])*d/dx(φ(x, y)[0]), x = xx[0] .. xx[1]), y = yy[0] .. yy[1]);
    integral(integral((d/dx(φ(x, y)[1]))^2, x = xx[0] .. xx[1]), y = yy[0] .. yy[1]);
    integral(integral(d/dx(φ(x, y)[1])*d/dx(φ(x, y)[2]), x = xx[0] .. xx[1]), y = yy[0] .. yy[1]);
    integral(integral(d/dx(φ(x, y)[1])*d/dx(φ(x, y)[3]), x = xx[0] .. xx[1]), y = yy[0] .. yy[1]);
    integral(integral(d/dx(φ(x, y)[2])*d/dx(φ(x, y)[0]), x = xx[0] .. xx[1]), y = yy[0] .. yy[1]);
    integral(integral(d/dx(φ(x, y)[2])*d/dx(φ(x, y)[1]), x = xx[0] .. xx[1]), y = yy[0] .. yy[1]);
    integral(integral((d/dx(φ(x, y)[2]))^2, x = xx[0] .. xx[1]), y = yy[0] .. yy[1]);
    integral(integral(d/dx(φ(x, y)[2])*d/dx(φ(x, y)[3]), x = xx[0] .. xx[1]), y = yy[0] .. yy[1]);
    integral(integral(d/dx(φ(x, y)[3])*d/dx(φ(x, y)[0]), x = xx[0] .. xx[1]), y = yy[0] .. yy[1]);
    integral(integral(d/dx(φ(x, y)[3])*d/dx(φ(x, y)[1]), x = xx[0] .. xx[1]), y = yy[0] .. yy[1]);
    integral(integral(d/dx(φ(x, y)[3])*d/dx(φ(x, y)[2]), x = xx[0] .. xx[1]), y = yy[0] .. yy[1]);
    integral(integral((d/dx(φ(x, y)[3]))^2, x = xx[0] .. xx[1]), y = yy[0] .. yy[1])
]
Ky := [
    integral(integral((d/dy(φ(x, y)[0]))^2, x = xx[0] .. xx[1]), y = yy[0] .. yy[1]);
    integral(integral(d/dy(φ(x, y)[0])*d/dy(φ(x, y)[1]), x = xx[0] .. xx[1]), y = yy[0] .. yy[1]);
    integral(integral(d/dy(φ(x, y)[0])*d/dy(φ(x, y)[2]), x = xx[0] .. xx[1]), y = yy[0] .. yy[1]);
    integral(integral(d/dy(φ(x, y)[0])*d/dy(φ(x, y)[3]), x = xx[0] .. xx[1]), y = yy[0] .. yy[1]);
    integral(integral(d/dy(φ(x, y)[1])*d/dy(φ(x, y)[0]), x = xx[0] .. xx[1]), y = yy[0] .. yy[1]);
    integral(integral((d/dy(φ(x, y)[1]))^2, x = xx[0] .. xx[1]), y = yy[0] .. yy[1]);
    integral(integral(d/dy(φ(x, y)[1])*d/dy(φ(x, y)[2]), x = xx[0] .. xx[1]), y = yy[0] .. yy[1]);
    integral(integral(d/dy(φ(x, y)[1])*d/dy(φ(x, y)[3]), x = xx[0] .. xx[1]), y = yy[0] .. yy[1]);
    integral(integral(d/dy(φ(x, y)[2])*d/dy(φ(x, y)[0]), x = xx[0] .. xx[1]), y = yy[0] .. yy[1]);
    integral(integral(d/dy(φ(x, y)[2])*d/dy(φ(x, y)[1]), x = xx[0] .. xx[1]), y = yy[0] .. yy[1]);
    integral(integral((d/dy(φ(x, y)[2]))^2, x = xx[0] .. xx[1]), y = yy[0] .. yy[1]);
    integral(integral(d/dy(φ(x, y)[2])*d/dy(φ(x, y)[3]), x = xx[0] .. xx[1]), y = yy[0] .. yy[1]);
    integral(integral(d/dy(φ(x, y)[3])*d/dy(φ(x, y)[0]), x = xx[0] .. xx[1]), y = yy[0] .. yy[1]);
    integral(integral(d/dy(φ(x, y)[3])*d/dy(φ(x, y)[1]), x = xx[0] .. xx[1]), y = yy[0] .. yy[1]);
    integral(integral(d/dy(φ(x, y)[3])*d/dy(φ(x, y)[2]), x = xx[0] .. xx[1]), y = yy[0] .. yy[1]);
    integral(integral((d/dy(φ(x, y)[3]))^2, x = xx[0] .. xx[1]), y = yy[0] .. yy[1])
]
Kx31
Kxy := [
    integral(integral(d/dx(φ(x, y)[0])*d/dy(φ(x, y)[0]), x = xx[0] .. xx[1]), y = yy[0] .. yy[1]);
    integral(integral(d/dx(φ(x, y)[0])*d/dy(φ(x, y)[1]), x = xx[0] .. xx[1]), y = yy[0] .. yy[1]);
    integral(integral(d/dx(φ(x, y)[0])*d/dy(φ(x, y)[2]), x = xx[0] .. xx[1]), y = yy[0] .. yy[1]);
    integral(integral(d/dx(φ(x, y)[0])*d/dy(φ(x, y)[3]), x = xx[0] .. xx[1]), y = yy[0] .. yy[1]);
    integral(integral(d/dx(φ(x, y)[1])*d/dy(φ(x, y)[0]), x = xx[0] .. xx[1]), y = yy[0] .. yy[1]);
    integral(integral(d/dx(φ(x, y)[1])*d/dy(φ(x, y)[1]), x = xx[0] .. xx[1]), y = yy[0] .. yy[1]);
    integral(integral(d/dx(φ(x, y)[1])*d/dy(φ(x, y)[2]), x = xx[0] .. xx[1]), y = yy[0] .. yy[1]);
    integral(integral(d/dx(φ(x, y)[1])*d/dy(φ(x, y)[3]), x = xx[0] .. xx[1]), y = yy[0] .. yy[1]);
    integral(integral(d/dx(φ(x, y)[2])*d/dy(φ(x, y)[0]), x = xx[0] .. xx[1]), y = yy[0] .. yy[1]);
    integral(integral(d/dx(φ(x, y)[2])*d/dy(φ(x, y)[1]), x = xx[0] .. xx[1]), y = yy[0] .. yy[1]);
    integral(integral(d/dx(φ(x, y)[2])*d/dy(φ(x, y)[2]), x = xx[0] .. xx[1]), y = yy[0] .. yy[1]);
    integral(integral(d/dx(φ(x, y)[2])*d/dy(φ(x, y)[3]), x = xx[0] .. xx[1]), y = yy[0] .. yy[1]);
    integral(integral(d/dx(φ(x, y)[3])*d/dy(φ(x, y)[0]), x = xx[0] .. xx[1]), y = yy[0] .. yy[1]);
    integral(integral(d/dx(φ(x, y)[3])*d/dy(φ(x, y)[1]), x = xx[0] .. xx[1]), y = yy[0] .. yy[1]);
    integral(integral(d/dx(φ(x, y)[3])*d/dy(φ(x, y)[2]), x = xx[0] .. xx[1]), y = yy[0] .. yy[1]);
    integral(integral(d/dx(φ(x, y)[3])*d/dy(φ(x, y)[3]), x = xx[0] .. xx[1]), y = yy[0] .. yy[1])
]
Kyx := [
    integral(integral(d/dy(φ(x, y)[0])*d/dx(φ(x, y)[0]), x = xx[0] .. xx[1]), y = yy[0] .. yy[1]);
    integral(integral(d/dy(φ(x, y)[0])*d/dx(φ(x, y)[1]), x = xx[0] .. xx[1]), y = yy[0] .. yy[1]);
    integral(integral(d/dy(φ(x, y)[0])*d/dx(φ(x, y)[2]), x = xx[0] .. xx[1]), y = yy[0] .. yy[1]);
    integral(integral(d/dy(φ(x, y)[0])*d/dx(φ(x, y)[3]), x = xx[0] .. xx[1]), y = yy[0] .. yy[1]);
    integral(integral(d/dy(φ(x, y)[1])*d/dx(φ(x, y)[0]), x = xx[0] .. xx[1]), y = yy[0] .. yy[1]);
    integral(integral(d/dy(φ(x, y)[1])*d/dx(φ(x, y)[1]), x = xx[0] .. xx[1]), y = yy[0] .. yy[1]);
    integral(integral(d/dy(φ(x, y)[1])*d/dx(φ(x, y)[2]), x = xx[0] .. xx[1]), y = yy[0] .. yy[1]);
    integral(integral(d/dy(φ(x, y)[1])*d/dx(φ(x, y)[3]), x = xx[0] .. xx[1]), y = yy[0] .. yy[1]);
    integral(integral(d/dy(φ(x, y)[2])*d/dx(φ(x, y)[0]), x = xx[0] .. xx[1]), y = yy[0] .. yy[1]);
    integral(integral(d/dy(φ(x, y)[2])*d/dx(φ(x, y)[1]), x = xx[0] .. xx[1]), y = yy[0] .. yy[1]);
    integral(integral(d/dy(φ(x, y)[2])*d/dx(φ(x, y)[2]), x = xx[0] .. xx[1]), y = yy[0] .. yy[1]);
    integral(integral(d/dy(φ(x, y)[2])*d/dx(φ(x, y)[3]), x = xx[0] .. xx[1]), y = yy[0] .. yy[1]);
    integral(integral(d/dy(φ(x, y)[3])*d/dx(φ(x, y)[0]), x = xx[0] .. xx[1]), y = yy[0] .. yy[1]);
    integral(integral(d/dy(φ(x, y)[3])*d/dx(φ(x, y)[1]), x = xx[0] .. xx[1]), y = yy[0] .. yy[1]);
    integral(integral(d/dy(φ(x, y)[3])*d/dx(φ(x, y)[2]), x = xx[0] .. xx[1]), y = yy[0] .. yy[1]);
    integral(integral(d/dy(φ(x, y)[3])*d/dx(φ(x, y)[3]), x = xx[0] .. xx[1]), y = yy[0] .. yy[1])
]
Kx32
Kx33
Kx34
Kx41
Kx42
Kx43
Kx44
Kx = [0.222222; -0.222222; -0.111111; 0.111111; -0.222222; 0.222222; 0.111111; -0.111111; -0.111111; 0.111111; 0.222222; -0.222222; 0.111111; -0.111111; -0.222222; 0.222222]
Ky = [0.5; 0.25; -0.25; -0.5; 0.25; 0.5; -0.5; -0.25; -0.25; -0.5; 0.5; 0.25; -0.5; -0.25; 0.25; 0.5]
Kxy = [0.25; 0.25; -0.25; -0.25; -0.25; -0.25; 0.25; 0.25; -0.25; -0.25; 0.25; 0.25; 0.25; 0.25; -0.25; -0.25]
Kyx = [0.25; -0.25; -0.25; 0.25; 0.25; -0.25; -0.25; 0.25; -0.25; 0.25; 0.25; -0.25; -0.25; 0.25; 0.25; -0.25]
Kx[2] = -0.111111
Ky[2] = -0.25
E := 2.1*10^5
μ := 0.3
h := 3  # м
Kxy[2] = -0.25
Kyx[2] = -0.25
D := E/(1 - μ^2)*[1, μ, 0; μ, 1, 0; 0, 0, (1 - μ)/2] = [230769, 69230.8, 0; 69230.8, 230769, 0; 0, 0, 80769.2]
Ae := h*[
    D[0, 0]*Kx[0] + D[2, 2]*Ky[0], D[0, 1]*Kxy[0] + D[2, 2]*Kyx[0], D[0, 0]*Kx[1] + D[2, 2]*Ky[1], D[0, 1]*Kxy[1] + D[2, 2]*Kyx[1], D[0, 0]*Kx[2] + D[2, 2]*Ky[2], D[0, 1]*Kxy[2] + D[2, 2]*Kyx[2], D[0, 0]*Kx[3] + D[2, 2]*Ky[3], D[0, 1]*Kxy[3] + D[2, 2]*Kyx[3];
    D[1, 0]*Kyx[0] + D[2, 2]*Kxy[0], D[2, 2]*Kx[0] + D[1, 1]*Ky[0], D[1, 0]*Kyx[1] + D[2, 2]*Kxy[1], D[2, 2]*Kx[1] + D[1, 1]*Ky[1], D[1, 0]*Kyx[2] + D[2, 2]*Kxy[2], D[2, 2]*Kx[2] + D[1, 1]*Ky[2], D[1, 0]*Kyx[3] + D[2, 2]*Kxy[3], D[2, 2]*Kx[3] + D[1, 1]*Ky[3];
    D[0, 0]*Kx[4] + D[2, 2]*Ky[4], D[0, 1]*Kxy[4] + D[2, 2]*Kyx[4], D[0, 0]*Kx[5] + D[2, 2]*Ky[5], D[0, 1]*Kxy[5] + D[2, 2]*Kyx[5], D[0, 0]*Kx[6] + D[2, 2]*Ky[6], D[0, 1]*Kxy[6] + D[2, 2]*Kyx[6], D[0, 0]*Kx[7] + D[2, 2]*Ky[7], D[0, 1]*Kxy[7] + D[2, 2]*Kyx[7];
    D[1, 0]*Kyx[4] + D[2, 2]*Kxy[4], D[2, 2]*Kx[4] + D[1, 1]*Ky[4], D[1, 0]*Kyx[5] + D[2, 2]*Kxy[5], D[2, 2]*Kx[5] + D[1, 1]*Ky[5], D[1, 0]*Kyx[6] + D[2, 2]*Kxy[6], D[2, 2]*Kx[6] + D[1, 1]*Ky[6], D[1, 0]*Kyx[7] + D[2, 2]*Kxy[7], D[2, 2]*Kx[7] + D[1, 1]*Ky[7];
    D[0, 0]*Kx[8] + D[2, 2]*Ky[8], D[0, 1]*Kxy[8] + D[2, 2]*Kyx[8], D[0, 0]*Kx[9] + D[2, 2]*Ky[9], D[0, 1]*Kxy[9] + D[2, 2]*Kyx[9], D[0, 0]*Kx[10] + D[2, 2]*Ky[10], D[0, 1]*Kxy[10] + D[2, 2]*Kyx[10], D[0, 0]*Kx[11] + D[2, 2]*Ky[11], D[0, 1]*Kxy[11] + D[2, 2]*Kyx[11];
    D[1, 0]*Kyx[8] + D[2, 2]*Kxy[8], D[2, 2]*Kx[8] + D[1, 1]*Ky[8], D[1, 0]*Kyx[9] + D[2, 2]*Kxy[9], D[2, 2]*Kx[9] + D[1, 1]*Ky[9], D[1, 0]*Kyx[10] + D[2, 2]*Kxy[10], D[2, 2]*Kx[10] + D[1, 1]*Ky[10], D[1, 0]*Kyx[11] + D[2, 2]*Kxy[11], D[2, 2]*Kx[11] + D[1, 1]*Ky[11];
    D[0, 0]*Kx[12] + D[2, 2]*Ky[12], D[0, 1]*Kxy[12] + D[2, 2]*Kyx[12], D[0, 0]*Kx[13] + D[2, 2]*Ky[13], D[0, 1]*Kxy[13] + D[2, 2]*Kyx[13], D[0, 0]*Kx[14] + D[2, 2]*Ky[14], D[0, 1]*Kxy[14] + D[2, 2]*Kyx[14], D[0, 0]*Kx[15] + D[2, 2]*Ky[15], D[0, 1]*Kxy[15] + D[2, 2]*Kyx[15];
    D[1, 0]*Kyx[12] + D[2, 2]*Kxy[12], D[2, 2]*Kx[12] + D[1, 1]*Ky[12], D[1, 0]*Kyx[13] + D[2, 2]*Kxy[13], D[2, 2]*Kx[13] + D[1, 1]*Ky[13], D[1, 0]*Kyx[14] + D[2, 2]*Kxy[14], D[2, 2]*Kx[14] + D[1, 1]*Ky[14], D[1, 0]*Kyx[15] + D[2, 2]*Kxy[15], D[2, 2]*Kx[15] + D[1, 1]*Ky[15]
]
fix_nodes := [1; 2]
Ae = [
    275000, 112500, -93269.2, -8653.85, -137500, -112500, -44230.8, 8653.85;
    112500, 400000, 8653.85, 119231, -112500, -200000, -8653.85, -319231;
    -93269.2, 8653.85, 275000, -112500, -44230.8, -8653.85, -137500, 112500;
    -8653.85, 119231, -112500, 400000, 8653.85, -319231, 112500, -200000;
    -137500, -112500, -44230.8, 8653.85, 275000, 112500, -93269.2, -8653.85;
    -112500, -200000, -8653.85, -319231, 112500, 400000, 8653.85, 119231;
    -44230.8, -8653.85, -137500, 112500, -93269.2, 8653.85, 275000, -112500;
    8653.85, -319231, 112500, -200000, -8653.85, 119231, -112500, 400000
]
i := 0 .. 7
Ae[2*fix_nodes[0], i] := 0
Ae[2*fix_nodes[1], i] := 0
Ae[i, 2*fix_nodes[0]] := 0
Ae[i, 2*fix_nodes[1]] := 0
rank(Ae) = 5
|Ae| = 0
Ae[2*fix_nodes[0] + 1, i] := 0
Ae[2*fix_nodes[1] + 1, i] := 0
Ae[i, 2*fix_nodes[0] + 1] := 0
Ae[i, 2*fix_nodes[1] + 1] := 0
Ae[2*fix_nodes[0], 2*fix_nodes[0]] := 1
Ae[2*fix_nodes[1], 2*fix_nodes[1]] := 1
Ae[2*fix_nodes[1] + 1, 2*fix_nodes[1] + 1] := 1
Ae[2*fix_nodes[0] + 1, 2*fix_nodes[0] + 1] := 1
Px := -1000  # Н/м
loaded_nodes := [0; 3]
Ae = [
    275000, 112500, 0, 0, 0, 0, -44230.8, 8653.85;
    112500, 400000, 0, 0, 0, 0, -8653.85, -319231;
    0, 0, 1, 0, 0, 0, 0, 0;
    0, 0, 0, 1, 0, 0, 0, 0;
    0, 0, 0, 0, 1, 0, 0, 0;
    0, 0, 0, 0, 0, 1, 0, 0;
    -44230.8, -8653.85, 0, 0, 0, 0, 275000, -112500;
    8653.85, -319231, 0, 0, 0, 0, -112500, 400000
]
I1 := integral(Y1(y), y = yy[0] .. yy[1]) = 50
I2 := integral(Y2(y), y = yy[0] .. yy[1]) = 50
|Ae| = 1.72353e21
Y2(yy[0]) = 0
Y2(3) = 0.03
b := [Px*I1; 0; 0; 0; 0; 0; Px*I2; 0] = [-50000; 0; 0; 0; 0; 0; -50000; 0]
sum(b[i], i = 0 .. 7) = -100000
u := Ae^-1*b
u = [-0.231722; 0.0334572; 0; 0; 0; 0; -0.231722; -0.0334572]
