xx := [147.17; 148.59]
yy := [0; 12.0890]
X1(x) := (xx[1] - x)/(xx[1] - xx[0])
X2(x) := (x - xx[0])/(xx[1] - xx[0])
Y1(y) := (yy[1] - y)/(yy[1] - yy[0])
Y2(y) := (y - yy[0])/(yy[1] - yy[0])
x_cur := xx[0]
y_cur := yy[1]
φ1(x, y) := X1(x)*Y1(y)
φ2(x, y) := X2(x)*Y1(y)
φ3(x, y) := X2(x)*Y2(y)
φ4(x, y) := X1(x)*Y2(y)
φ4(x_cur, y_cur) = 1
φ3(x_cur, y_cur) = 0
φ(x, y) := [φ1(x, y); φ2(x, y); φ3(x, y); φ4(x, y)]
φ1(x_cur, y_cur) = 0
φ2(x_cur, y_cur) = 0
Kx11
Kx12
Kx13
Kx14
Kx21
Kx22
Kx23
Kx24
Kx := [
    integral(integral((d/dx(φ(x, y)[0]))^2, x = xx[0] .. xx[1]), y = yy[0] .. yy[1]);
    integral(integral(d/dx(φ(x, y)[0])*d/dx(φ(x, y)[1]), x = xx[0] .. xx[1]), y = yy[0] .. yy[1]);
    integral(integral(d/dx(φ(x, y)[0])*d/dx(φ(x, y)[2]), x = xx[0] .. xx[1]), y = yy[0] .. yy[1]);
    integral(integral(d/dx(φ(x, y)[0])*d/dx(φ(x, y)[3]), x = xx[0] .. xx[1]), y = yy[0] .. yy[1]);
    integral(integral(d/dx(φ(x, y)[1])*d/dx(φ(x, y)[0]), x = xx[0] .. xx[1]), y = yy[0] .. yy[1]);
    integral(integral((d/dx(φ(x, y)[1]))^2, x = xx[0] .. xx[1]), y = yy[0] .. yy[1]);
    integral(integral(d/dx(φ(x, y)[1])*d/dx(φ(x, y)[2]), x = xx[0] .. xx[1]), y = yy[0] .. yy[1]);
    integral(integral(d/dx(φ(x, y)[1])*d/dx(φ(x, y)[3]), x = xx[0] .. xx[1]), y = yy[0] .. yy[1]);
    integral(integral(d/dx(φ(x, y)[2])*d/dx(φ(x, y)[0]), x = xx[0] .. xx[1]), y = yy[0] .. yy[1]);
    integral(integral(d/dx(φ(x, y)[2])*d/dx(φ(x, y)[1]), x = xx[0] .. xx[1]), y = yy[0] .. yy[1]);
    integral(integral((d/dx(φ(x, y)[2]))^2, x = xx[0] .. xx[1]), y = yy[0] .. yy[1]);
    integral(integral(d/dx(φ(x, y)[2])*d/dx(φ(x, y)[3]), x = xx[0] .. xx[1]), y = yy[0] .. yy[1]);
    integral(integral(d/dx(φ(x, y)[3])*d/dx(φ(x, y)[0]), x = xx[0] .. xx[1]), y = yy[0] .. yy[1]);
    integral(integral(d/dx(φ(x, y)[3])*d/dx(φ(x, y)[1]), x = xx[0] .. xx[1]), y = yy[0] .. yy[1]);
    integral(integral(d/dx(φ(x, y)[3])*d/dx(φ(x, y)[2]), x = xx[0] .. xx[1]), y = yy[0] .. yy[1]);
    integral(integral((d/dx(φ(x, y)[3]))^2, x = xx[0] .. xx[1]), y = yy[0] .. yy[1])
]
Ky := [
    integral(integral((d/dy(φ(x, y)[0]))^2, x = xx[0] .. xx[1]), y = yy[0] .. yy[1]);
    integral(integral(d/dy(φ(x, y)[0])*d/dy(φ(x, y)[1]), x = xx[0] .. xx[1]), y = yy[0] .. yy[1]);
    integral(integral(d/dy(φ(x, y)[0])*d/dy(φ(x, y)[2]), x = xx[0] .. xx[1]), y = yy[0] .. yy[1]);
    integral(integral(d/dy(φ(x, y)[0])*d/dy(φ(x, y)[3]), x = xx[0] .. xx[1]), y = yy[0] .. yy[1]);
    integral(integral(d/dy(φ(x, y)[1])*d/dy(φ(x, y)[0]), x = xx[0] .. xx[1]), y = yy[0] .. yy[1]);
    integral(integral((d/dy(φ(x, y)[1]))^2, x = xx[0] .. xx[1]), y = yy[0] .. yy[1]);
    integral(integral(d/dy(φ(x, y)[1])*d/dy(φ(x, y)[2]), x = xx[0] .. xx[1]), y = yy[0] .. yy[1]);
    integral(integral(d/dy(φ(x, y)[1])*d/dy(φ(x, y)[3]), x = xx[0] .. xx[1]), y = yy[0] .. yy[1]);
    integral(integral(d/dy(φ(x, y)[2])*d/dy(φ(x, y)[0]), x = xx[0] .. xx[1]), y = yy[0] .. yy[1]);
    integral(integral(d/dy(φ(x, y)[2])*d/dy(φ(x, y)[1]), x = xx[0] .. xx[1]), y = yy[0] .. yy[1]);
    integral(integral((d/dy(φ(x, y)[2]))^2, x = xx[0] .. xx[1]), y = yy[0] .. yy[1]);
    integral(integral(d/dy(φ(x, y)[2])*d/dy(φ(x, y)[3]), x = xx[0] .. xx[1]), y = yy[0] .. yy[1]);
    integral(integral(d/dy(φ(x, y)[3])*d/dy(φ(x, y)[0]), x = xx[0] .. xx[1]), y = yy[0] .. yy[1]);
    integral(integral(d/dy(φ(x, y)[3])*d/dy(φ(x, y)[1]), x = xx[0] .. xx[1]), y = yy[0] .. yy[1]);
    integral(integral(d/dy(φ(x, y)[3])*d/dy(φ(x, y)[2]), x = xx[0] .. xx[1]), y = yy[0] .. yy[1]);
    integral(integral((d/dy(φ(x, y)[3]))^2, x = xx[0] .. xx[1]), y = yy[0] .. yy[1])
]
Kx31
Kxy := [
    integral(integral(d/dx(φ(x, y)[0])*d/dy(φ(x, y)[0]), x = xx[0] .. xx[1]), y = yy[0] .. yy[1]);
    integral(integral(d/dx(φ(x, y)[0])*d/dy(φ(x, y)[1]), x = xx[0] .. xx[1]), y = yy[0] .. yy[1]);
    integral(integral(d/dx(φ(x, y)[0])*d/dy(φ(x, y)[2]), x = xx[0] .. xx[1]), y = yy[0] .. yy[1]);
    integral(integral(d/dx(φ(x, y)[0])*d/dy(φ(x, y)[3]), x = xx[0] .. xx[1]), y = yy[0] .. yy[1]);
    integral(integral(d/dx(φ(x, y)[1])*d/dy(φ(x, y)[0]), x = xx[0] .. xx[1]), y = yy[0] .. yy[1]);
    integral(integral(d/dx(φ(x, y)[1])*d/dy(φ(x, y)[1]), x = xx[0] .. xx[1]), y = yy[0] .. yy[1]);
    integral(integral(d/dx(φ(x, y)[1])*d/dy(φ(x, y)[2]), x = xx[0] .. xx[1]), y = yy[0] .. yy[1]);
    integral(integral(d/dx(φ(x, y)[1])*d/dy(φ(x, y)[3]), x = xx[0] .. xx[1]), y = yy[0] .. yy[1]);
    integral(integral(d/dx(φ(x, y)[2])*d/dy(φ(x, y)[0]), x = xx[0] .. xx[1]), y = yy[0] .. yy[1]);
    integral(integral(d/dx(φ(x, y)[2])*d/dy(φ(x, y)[1]), x = xx[0] .. xx[1]), y = yy[0] .. yy[1]);
    integral(integral(d/dx(φ(x, y)[2])*d/dy(φ(x, y)[2]), x = xx[0] .. xx[1]), y = yy[0] .. yy[1]);
    integral(integral(d/dx(φ(x, y)[2])*d/dy(φ(x, y)[3]), x = xx[0] .. xx[1]), y = yy[0] .. yy[1]);
    integral(integral(d/dx(φ(x, y)[3])*d/dy(φ(x, y)[0]), x = xx[0] .. xx[1]), y = yy[0] .. yy[1]);
    integral(integral(d/dx(φ(x, y)[3])*d/dy(φ(x, y)[1]), x = xx[0] .. xx[1]), y = yy[0] .. yy[1]);
    integral(integral(d/dx(φ(x, y)[3])*d/dy(φ(x, y)[2]), x = xx[0] .. xx[1]), y = yy[0] .. yy[1]);
    integral(integral(d/dx(φ(x, y)[3])*d/dy(φ(x, y)[3]), x = xx[0] .. xx[1]), y = yy[0] .. yy[1])
]
Kyx := [
    integral(integral(d/dy(φ(x, y)[0])*d/dx(φ(x, y)[0]), x = xx[0] .. xx[1]), y = yy[0] .. yy[1]);
    integral(integral(d/dy(φ(x, y)[0])*d/dx(φ(x, y)[1]), x = xx[0] .. xx[1]), y = yy[0] .. yy[1]);
    integral(integral(d/dy(φ(x, y)[0])*d/dx(φ(x, y)[2]), x = xx[0] .. xx[1]), y = yy[0] .. yy[1]);
    integral(integral(d/dy(φ(x, y)[0])*d/dx(φ(x, y)[3]), x = xx[0] .. xx[1]), y = yy[0] .. yy[1]);
    integral(integral(d/dy(φ(x, y)[1])*d/dx(φ(x, y)[0]), x = xx[0] .. xx[1]), y = yy[0] .. yy[1]);
    integral(integral(d/dy(φ(x, y)[1])*d/dx(φ(x, y)[1]), x = xx[0] .. xx[1]), y = yy[0] .. yy[1]);
    integral(integral(d/dy(φ(x, y)[1])*d/dx(φ(x, y)[2]), x = xx[0] .. xx[1]), y = yy[0] .. yy[1]);
    integral(integral(d/dy(φ(x, y)[1])*d/dx(φ(x, y)[3]), x = xx[0] .. xx[1]), y = yy[0] .. yy[1]);
    integral(integral(d/dy(φ(x, y)[2])*d/dx(φ(x, y)[0]), x = xx[0] .. xx[1]), y = yy[0] .. yy[1]);
    integral(integral(d/dy(φ(x, y)[2])*d/dx(φ(x, y)[1]), x = xx[0] .. xx[1]), y = yy[0] .. yy[1]);
    integral(integral(d/dy(φ(x, y)[2])*d/dx(φ(x, y)[2]), x = xx[0] .. xx[1]), y = yy[0] .. yy[1]);
    integral(integral(d/dy(φ(x, y)[2])*d/dx(φ(x, y)[3]), x = xx[0] .. xx[1]), y = yy[0] .. yy[1]);
    integral(integral(d/dy(φ(x, y)[3])*d/dx(φ(x, y)[0]), x = xx[0] .. xx[1]), y = yy[0] .. yy[1]);
    integral(integral(d/dy(φ(x, y)[3])*d/dx(φ(x, y)[1]), x = xx[0] .. xx[1]), y = yy[0] .. yy[1]);
    integral(integral(d/dy(φ(x, y)[3])*d/dx(φ(x, y)[2]), x = xx[0] .. xx[1]), y = yy[0] .. yy[1]);
    integral(integral(d/dy(φ(x, y)[3])*d/dx(φ(x, y)[3]), x = xx[0] .. xx[1]), y = yy[0] .. yy[1])
]
Kx32
Kx33
Kx34
Kx41
Kx42
Kx43
Kx44
# четырехугольник:
xq := [148.585786438; 148.86862915; 148.86862915; 148.585786438]
yq := [0; 0; 12.0383054925; 12.0890196896]
x(ξ, η, x1, y1, x2, y2, x3, y3, x4, y4) := (1 - ξ)*(1 - η)*x1 + ξ*(1 - η)*x2 + ξ*η*x3 + (1 - ξ)*η*x4
y(ξ, η, x1, y1, x2, y2, x3, y3, x4, y4) := (1 - ξ)*(1 - η)*y1 + ξ*(1 - η)*y2 + ξ*η*y3 + (1 - ξ)*η*y4
d/dξ(x(ξ, η, x1, y1, x2, y2, x3, y3, x4, y4)) → x1*(η - 1) - x2*(η - 1) + η*x3 - η*x4
d/dξ(y(ξ, η, x1, y1, x2, y2, x3, y3, x4, y4)) → y1*(η - 1) - y2*(η - 1) + η*y3 - η*y4
d/dη(x(ξ, η, x1, y1, x2, y2, x3, y3, x4, y4)) → x1*(ξ - 1) - x4*(ξ - 1) - ξ*x2 + ξ*x3
d/dη(y(ξ, η, x1, y1, x2, y2, x3, y3, x4, y4)) → y1*(ξ - 1) - y4*(ξ - 1) - ξ*y2 + ξ*y3
J(ξ, η, x1, y1, x2, y2, x3, y3, x4, y4) := [
    d/dξ(x(ξ, η, x1, y1, x2, y2, x3, y3, x4, y4)), d/dξ(y(ξ, η, x1, y1, x2, y2, x3, y3, x4, y4));
    d/dη(x(ξ, η, x1, y1, x2, y2, x3, y3, x4, y4)), d/dη(y(ξ, η, x1, y1, x2, y2, x3, y3, x4, y4))
]
|J(ξ, η, x1, y1, x2, y2, x3, y3, x4, y4)| collect, ξ, η → (x3*y1 - x1*y3 + x1*y4 + x2*y3 - x3*y2 - x4*y1 - x2*y4 + x4*y2)*ξ + (x2*y1 - x1*y2 + x1*y3 - x3*y1 - x2*y4 + x4*y2 + x3*y4 - x4*y3)*η + x1*y2 - x2*y1 - x1*y4 + x4*y1 + x2*y4 - x4*y2
# Интегралы в шаблонных координатах
β1 := xq[3] - xq[0] = 0
β2 := xq[1] - xq[0] = 0.282843
β3 := yq[3] - yq[0] = 12.089
α0 := (xq[1] - xq[0])*(yq[3] - yq[0]) - (yq[1] - yq[0])*(xq[3] - xq[0]) = 3.41929
β4 := yq[1] - yq[0] = 0
β5 := xq[0] - xq[1] + xq[2] - xq[3] = 0
β6 := yq[0] - yq[1] + yq[2] - yq[3] = -0.0507142
α1 := (xq[1] - xq[0])*(yq[2] - yq[3]) - (yq[1] - yq[0])*(xq[2] - xq[3]) = -0.0143441
W1_ksi(ξ) := 1 - ξ
W2_ksi(ξ) := ξ
α2 := (yq[3] - yq[0])*(xq[2] - xq[1]) - (xq[3] - xq[0])*(yq[2] - yq[1]) = 0
W1_eta(η) := 1 - η
W2_eta(η) := η
detJ(ξ, η) := α0 + α1*ξ + α2*η
φ1t(ξ, η) := W1_ksi(ξ)*W1_eta(η)
φ2t(ξ, η) := W2_ksi(ξ)*W1_eta(η)
φ3t(ξ, η) := W2_ksi(ξ)*W2_eta(η)
φ4t(ξ, η) := W1_ksi(ξ)*W2_eta(η)
Kx11 := integral(integral(((d/dξ(φ3t(ξ, η)))*(β6*ξ + β3) - (d/dη(φ3t(ξ, η)))*(β6*η + β4))*((d/dξ(φ4t(ξ, η)))*(β6*ξ + β3) - (d/dη(φ4t(ξ, η)))*(β6*η + β4))*1/detJ(ξ, η), ξ = 0 .. 1), η = 0 .. 1) = -14.2171
Kxy12 := integral(integral(((d/dξ(φ3t(ξ, η)))*(β6*ξ + β3) - (d/dη(φ3t(ξ, η)))*(β6*η + β4))*((-d/dξ(φ4t(ξ, η)))*(β5*ξ + β1) + (d/dη(φ4t(ξ, η)))*(β5*η + β2))*1/detJ(ξ, η), ξ = 0 .. 1), η = 0 .. 1) = 0.25035
Ky12 := integral(integral(((-d/dξ(φ3t(ξ, η)))*(β5*ξ + β1) + (d/dη(φ3t(ξ, η)))*(β5*ξ + β2))*((-d/dξ(φ4t(ξ, η)))*(β5*ξ + β1) + (d/dη(φ4t(ξ, η)))*(β5*ξ + β2))*1/detJ(ξ, η), ξ = 0 .. 1), η = 0 .. 1) = 0.00390764
Kyx12 := integral(integral(((-d/dξ(φ3t(ξ, η)))*(β5*ξ + β1) + (d/dη(φ3t(ξ, η)))*(β5*η + β2))*((d/dξ(φ4t(ξ, η)))*(β6*ξ + β3) - (d/dη(φ4t(ξ, η)))*(β6*η + β4))*1/detJ(ξ, η), ξ = 0 .. 1), η = 0 .. 1) = -0.24965
gp_local := [-0.77459666; 0; 0.77459666]
gw := [5/9; 8/9; 5/9] = [0.555556; 0.888889; 0.555556]
grad1x(ξ, η) := (d/dξ(φ1t(ξ, η)))*(β6*ξ + β3) - (d/dη(φ1t(ξ, η)))*(β6*ξ + β4)
grad2x(ξ, η) := (d/dξ(φ2t(ξ, η)))*(β6*ξ + β3) - (d/dη(φ2t(ξ, η)))*(β6*ξ + β4)
grady(ξ, η) := (-d/dξ(φ4t(ξ, η)))*(β5*ξ + β1) + (d/dη(φ4t(ξ, η)))*(β5*ξ + β2)
ξ := (gp_local + 1)/2 = [0.112702; 0.5; 0.887298]
η := (gp_local + 1)/2 = [0.112702; 0.5; 0.887298]
Kxy11 := 1/4*sum(sum(gw[i]*gw[j]*gradx(ξ[i], η[j])*grady(ξ[i], η[j])/detJ(ξ[i], η[j]), j = 0 .. 2), i = 0 .. 2)  # error: This variable is undefined.
Kyx11 := 1/4*sum(sum(gw[i]*gw[j]*grady(ξ[i], η[j])*gradx(ξ[i], η[j])/detJ(ξ[i], η[j]), j = 0 .. 2), i = 0 .. 2)  # error: This variable is undefined.
Ky11 := 1/4*sum(sum(gw[i]*gw[j]*grady(ξ[i], η[j])*grady(ξ[i], η[j])/detJ(ξ[i], η[j]), j = 0 .. 2), i = 0 .. 2) = 0.00780708
Kx11 := 1/4*sum(sum(gw[i]*gw[j]*grad1x(ξ[i], η[j])*grad2x(ξ[i], η[j])/detJ(ξ[i], η[j]), j = 0 .. 2), i = 0 .. 2) = -14.2022
dφ1_dξ(ξ, η) := d/dξ(φ1t(ξ, η))
dφ2_dξ(ξ, η) := d/dξ(φ2t(ξ, η))
dφ3_dξ(ξ, η) := d/dξ(φ3t(ξ, η))
dφ4_dξ(ξ, η) := d/dξ(φ4t(ξ, η))
dφ1_dη(ξ, η) := d/dη(φ1t(ξ, η))
dφ2_dη(ξ, η) := d/dη(φ2t(ξ, η))
dφ3_dη(ξ, η) := d/dη(φ3t(ξ, η))
dφ4_dη(ξ, η) := d/dη(φ4t(ξ, η))
u1x := -6.7249*10^-6
u2x := -5.3799*10^-6
u3x := -5.396*10^-6
u4x := -6.745*10^-6
u1y := 7.225*10^-5
u2y := 7.225*10^-5
u3y := 5.509*10^-5
u4y := 5.502*10^-5
# Деформации по элементу:
εx(ξ, η) := u1x*dφ1_dξ(ξ, η)*(β6*ξ + β3)/detJ(ξ, η) + u2x*dφ2_dξ(ξ, η)*(β6*ξ + β3)/detJ(ξ, η) + u3x*dφ3_dξ(ξ, η)*(β6*ξ + β3)/detJ(ξ, η) + u4x*dφ4_dξ(ξ, η)*(β6*ξ + β3)/detJ(ξ, η)
εy(ξ, η) := u1y*d/dη(φ1t(ξ, η))*(β5*η + β2)/detJ(ξ, η) + u2y*d/dη(φ2t(ξ, η))*(β5*η + β2)/detJ(ξ, η) + u3y*d/dη(φ3t(ξ, η))*(β5*η + β2)/detJ(ξ, η) + u4y*d/dη(φ4t(ξ, η))*(β5*η + β2)/detJ(ξ, η)
εx(0.5, 0.5) = 4.76236e-6
E := 2.1*10^5
μ := 0.3
h := 3  # м
εxy(ξ, η) := u1y*d/dξ(φ1t(ξ, η))*(β6*ξ + β3)/detJ(ξ, η) + u1x*d/dη(φ1t(ξ, η))*(β5*η + β2)/detJ(ξ, η) + u2y*d/dξ(φ2t(ξ, η))*(β6*ξ + β3)/detJ(ξ, η) + u2x*d/dη(φ2t(ξ, η))*(β5*η + β2)/detJ(ξ, η) + u3y*d/dξ(φ3t(ξ, η))*(β6*ξ + β3)/detJ(ξ, η) + u3x*d/dη(φ3t(ξ, η))*(β5*η + β2)/detJ(ξ, η) + u4y*d/dξ(φ4t(ξ, η))*(β6*ξ + β3)/detJ(ξ, η) + u4x*d/dη(φ4t(ξ, η))*(β5*η + β2)/detJ(ξ, η)
εy(0.5, 0.5) = -1.42535e-6
D := E/(1 - μ^2)*[1, μ, 0; μ, 1, 0; 0, 0, (1 - μ)/2] = [230769, 69230.8, 0; 69230.8, 230769, 0; 0, 0, 80769.2]
εxy(0.5, 0.5) = 1.22243e-7
dφ4_dη(0.5, 0.5) = 0.5
detJ(0.5, 0.5) = 3.41212
dφ4_dξ(0.5, 0.5) = -0.5
σx(ξ, η) := D[0, 0]*εx(ξ, η) + D[0, 1]*εy(ξ, η)
σy(ξ, η) := D[1, 0]*εx(ξ, η) + D[1, 1]*εy(ξ, η)
σx(0.5, 0.5) = 1.00033
σy(0.5, 0.5) = 0.000774092
Kx[15] = 2.83779
Ky[15] = 0.0391541
Kxy[15] = -0.25
Kyx[15] = -0.25
Ae := h*[
    D[0, 0]*Kx[0] + D[2, 2]*Ky[0], D[0, 1]*Kxy[0] + D[2, 2]*Kyx[0], D[0, 0]*Kx[1] + D[2, 2]*Ky[1], D[0, 1]*Kxy[1] + D[2, 2]*Kyx[1], D[0, 0]*Kx[2] + D[2, 2]*Ky[2], D[0, 1]*Kxy[2] + D[2, 2]*Kyx[2], D[0, 0]*Kx[3] + D[2, 2]*Ky[3], D[0, 1]*Kxy[3] + D[2, 2]*Kyx[3];
    D[1, 0]*Kyx[0] + D[2, 2]*Kxy[0], D[2, 2]*Kx[0] + D[1, 1]*Ky[0], D[1, 0]*Kyx[1] + D[2, 2]*Kxy[1], D[2, 2]*Kx[1] + D[1, 1]*Ky[1], D[1, 0]*Kyx[2] + D[2, 2]*Kxy[2], D[2, 2]*Kx[2] + D[1, 1]*Ky[2], D[1, 0]*Kyx[3] + D[2, 2]*Kxy[3], D[2, 2]*Kx[3] + D[1, 1]*Ky[3];
    D[0, 0]*Kx[4] + D[2, 2]*Ky[4], D[0, 1]*Kxy[4] + D[2, 2]*Kyx[4], D[0, 0]*Kx[5] + D[2, 2]*Ky[5], D[0, 1]*Kxy[5] + D[2, 2]*Kyx[5], D[0, 0]*Kx[6] + D[2, 2]*Ky[6], D[0, 1]*Kxy[6] + D[2, 2]*Kyx[6], D[0, 0]*Kx[7] + D[2, 2]*Ky[7], D[0, 1]*Kxy[7] + D[2, 2]*Kyx[7];
    D[1, 0]*Kyx[4] + D[2, 2]*Kxy[4], D[2, 2]*Kx[4] + D[1, 1]*Ky[4], D[1, 0]*Kyx[5] + D[2, 2]*Kxy[5], D[2, 2]*Kx[5] + D[1, 1]*Ky[5], D[1, 0]*Kyx[6] + D[2, 2]*Kxy[6], D[2, 2]*Kx[6] + D[1, 1]*Ky[6], D[1, 0]*Kyx[7] + D[2, 2]*Kxy[7], D[2, 2]*Kx[7] + D[1, 1]*Ky[7];
    D[0, 0]*Kx[8] + D[2, 2]*Ky[8], D[0, 1]*Kxy[8] + D[2, 2]*Kyx[8], D[0, 0]*Kx[9] + D[2, 2]*Ky[9], D[0, 1]*Kxy[9] + D[2, 2]*Kyx[9], D[0, 0]*Kx[10] + D[2, 2]*Ky[10], D[0, 1]*Kxy[10] + D[2, 2]*Kyx[10], D[0, 0]*Kx[11] + D[2, 2]*Ky[11], D[0, 1]*Kxy[11] + D[2, 2]*Kyx[11];
    D[1, 0]*Kyx[8] + D[2, 2]*Kxy[8], D[2, 2]*Kx[8] + D[1, 1]*Ky[8], D[1, 0]*Kyx[9] + D[2, 2]*Kxy[9], D[2, 2]*Kx[9] + D[1, 1]*Ky[9], D[1, 0]*Kyx[10] + D[2, 2]*Kxy[10], D[2, 2]*Kx[10] + D[1, 1]*Ky[10], D[1, 0]*Kyx[11] + D[2, 2]*Kxy[11], D[2, 2]*Kx[11] + D[1, 1]*Ky[11];
    D[0, 0]*Kx[12] + D[2, 2]*Ky[12], D[0, 1]*Kxy[12] + D[2, 2]*Kyx[12], D[0, 0]*Kx[13] + D[2, 2]*Ky[13], D[0, 1]*Kxy[13] + D[2, 2]*Kyx[13], D[0, 0]*Kx[14] + D[2, 2]*Ky[14], D[0, 1]*Kxy[14] + D[2, 2]*Kyx[14], D[0, 0]*Kx[15] + D[2, 2]*Ky[15], D[0, 1]*Kxy[15] + D[2, 2]*Kyx[15];
    D[1, 0]*Kyx[12] + D[2, 2]*Kxy[12], D[2, 2]*Kx[12] + D[1, 1]*Ky[12], D[1, 0]*Kyx[13] + D[2, 2]*Kxy[13], D[2, 2]*Kx[13] + D[1, 1]*Ky[13], D[1, 0]*Kyx[14] + D[2, 2]*Kxy[14], D[2, 2]*Kx[14] + D[1, 1]*Ky[14], D[1, 0]*Kyx[15] + D[2, 2]*Kxy[15], D[2, 2]*Kx[15] + D[1, 1]*Ky[15]
]
fix_nodes := [1; 2]
Ae = [
    1974114, 112500, -1959883, -8653.85, -987057, -112500, 972826, 8653.85;
    112500, 714726, 8653.85, -674066, -112500, -357363, -8653.85, 316703;
    -1959883, 8653.85, 1974114, -112500, 972826, -8653.85, -987057, 112500;
    -8653.85, -674066, -112500, 714726, 8653.85, 316703, 112500, -357363;
    -987057, -112500, 972826, 8653.85, 1974114, 112500, -1959883, -8653.85;
    -112500, -357363, -8653.85, 316703, 112500, 714726, 8653.85, -674066;
    972826, -8653.85, -987057, 112500, -1959883, 8653.85, 1974114, -112500;
    8653.85, 316703, 112500, -357363, -8653.85, -674066, -112500, 714726
]
i := 0 .. 7
Ae[2*fix_nodes[0], i] := 0
Ae[2*fix_nodes[1], i] := 0
Ae[i, 2*fix_nodes[0]] := 0
Ae[i, 2*fix_nodes[1]] := 0
rank(Ae) = 5
|Ae| = 0
Ae[2*fix_nodes[0] + 1, i] := 0
Ae[2*fix_nodes[1] + 1, i] := 0
Ae[i, 2*fix_nodes[0] + 1] := 0
Ae[i, 2*fix_nodes[1] + 1] := 0
Ae[2*fix_nodes[0], 2*fix_nodes[0]] := 1
Ae[2*fix_nodes[1], 2*fix_nodes[1]] := 1
Ae[2*fix_nodes[1] + 1, 2*fix_nodes[1] + 1] := 1
Ae[2*fix_nodes[0] + 1, 2*fix_nodes[0] + 1] := 1
Px := -1000  # Н/м
loaded_nodes := [0; 3]
Ae = [
    1974114, 112500, 0, 0, 0, 0, 972826, 8653.85;
    112500, 714726, 0, 0, 0, 0, -8653.85, 316703;
    0, 0, 1, 0, 0, 0, 0, 0;
    0, 0, 0, 1, 0, 0, 0, 0;
    0, 0, 0, 0, 1, 0, 0, 0;
    0, 0, 0, 0, 0, 1, 0, 0;
    972826, -8653.85, 0, 0, 0, 0, 1974114, -112500;
    8653.85, 316703, 0, 0, 0, 0, -112500, 714726
]
I1 := integral(Y1(y), y = yy[0] .. yy[1]) = 6.0445
I2 := integral(Y2(y), y = yy[0] .. yy[1]) = 6.0445
b1 := (yy[1] - yy[0])/2*sum(gw[i]*Y1(((yy[1] + yy[0])/2) + gp_local[i]*(yy[1] - yy[0])/2), i = 0 .. 2) = 6.0445
|Ae| = 1.18318e24
1/2*sum(gw[i]*W1_ksi(ξ[i]), i = 0 .. 2) = 0.5
Y2(yy[0]) = 0
Y2(3) = 0.248159
b := [Px*I1; 0; 0; 0; 0; 0; Px*I2; 0] = [-6044.5; 0; 0; 0; 0; 0; -6044.5; 0]
sum(b[i], i = 0 .. 7) = -12089
dφ1_dx(x, y) := d/dx(φ1(x, y))
dφ2_dx(x, y) := d/dx(φ2(x, y))
dφ3_dx(x, y) := d/dx(φ3(x, y))
dφ4_dx(x, y) := d/dx(φ4(x, y))
u := Ae^-1*b
u1y := 0.00495
u2y := 0.00289
u3y := 0.0006645
u4y := 0.00184
u1x := -6.382*10^-3
u2x := -3.320*10^-3
u3x := -1.887*10^-3
u4x := -3.973*10^-3
dφ1_dy(x, y) := d/dy(φ1(x, y))
dφ2_dy(x, y) := d/dy(φ2(x, y))
u = [-0.00207014; 0.000540111; 0; 0; 0; 0; -0.00207014; -0.000540111]
dφ3_dy(x, y) := d/dy(φ3(x, y))
dφ4_dy(x, y) := d/dy(φ4(x, y))
εx(x, y) := u1x*dφ1_dx(x, y) + u2x*dφ2_dx(x, y) + u3x*dφ3_dx(x, y) + u4x*dφ4_dx(x, y)
εy(x, y) := u1y*dφ1_dy(x, y) + u2y*dφ2_dy(x, y) + u3y*dφ3_dy(x, y) + u4y*dφ4_dy(x, y)
xc := xx[0] + (xx[1] - xx[0])/2 = 147.88
yc := yy[0] + (yy[1] - yy[0])/2 = 6.0445
εx(xc, yc) = 0.00181268
εy(xc, yc) = -0.000220676
